Edit Load.MT_1704587_M1 kw=177.753036 daily=MT1_DU
Edit Load.MT_1704587_M2 kw=177.753036 daily=MT1_DU
Edit Load.MT_1722490_M1 kw=93.1830095 daily=MT4_DU
Edit Load.MT_1722490_M2 kw=93.1830095 daily=MT4_DU
Edit Load.MT_1722491_M1 kw=1.4561125 daily=MT3_DU
Edit Load.MT_1722491_M2 kw=1.4561125 daily=MT3_DU
Edit Load.MT_1728551_M1 kw=23.9547405 daily=MT2_DU
Edit Load.MT_1728551_M2 kw=23.9547405 daily=MT2_DU
