Edit Load.MT_1704587_M1 kw=151.3116685 daily=MT1_SA
Edit Load.MT_1704587_M2 kw=151.3116685 daily=MT1_SA
Edit Load.MT_1722490_M1 kw=82.256082 daily=MT4_SA
Edit Load.MT_1722490_M2 kw=82.256082 daily=MT4_SA
Edit Load.MT_1722491_M1 kw=4.8582275 daily=MT3_SA
Edit Load.MT_1722491_M2 kw=4.8582275 daily=MT3_SA
Edit Load.MT_1728551_M1 kw=4.6381185 daily=MT2_SA
Edit Load.MT_1728551_M2 kw=4.6381185 daily=MT2_SA
