Edit Load.MT_1704587_M1 kw=159.8189015 daily=MT1_DO
Edit Load.MT_1704587_M2 kw=159.8189015 daily=MT1_DO
Edit Load.MT_1722490_M1 kw=77.1335645 daily=MT4_DO
Edit Load.MT_1722490_M2 kw=77.1335645 daily=MT4_DO
Edit Load.MT_1722491_M1 kw=5.5494645 daily=MT3_DO
Edit Load.MT_1722491_M2 kw=5.5494645 daily=MT3_DO
Edit Load.MT_1728551_M1 kw=4.6166235 daily=MT2_DO
Edit Load.MT_1728551_M2 kw=4.6166235 daily=MT2_DO
