Edit Load.MT_1234839_M1 kw=10.9215135 daily=MT2_SA
Edit Load.MT_1234839_M2 kw=10.9215135 daily=MT2_SA
Edit Load.MT_1237803_M1 kw=24.1813125 daily=MT4_SA
Edit Load.MT_1237803_M2 kw=24.1813125 daily=MT4_SA
Edit Load.MT_1238514_M1 kw=9.4911635 daily=MT5_SA
Edit Load.MT_1238514_M2 kw=9.4911635 daily=MT5_SA
