Edit Load.MT_1234839_M1 kw=5.3520555 daily=MT2_DO
Edit Load.MT_1234839_M2 kw=5.3520555 daily=MT2_DO
Edit Load.MT_1237803_M1 kw=10.3806095 daily=MT4_DO
Edit Load.MT_1237803_M2 kw=10.3806095 daily=MT4_DO
Edit Load.MT_1238514_M1 kw=10.1069815 daily=MT5_DO
Edit Load.MT_1238514_M2 kw=10.1069815 daily=MT5_DO
