Edit Load.MT_327519_M1 kw=5.5340925 daily=MT4_DO
Edit Load.MT_327519_M2 kw=5.5340925 daily=MT4_DO
Edit Load.MT_334993_M1 kw=58.9330755 daily=MT1_DO
Edit Load.MT_334993_M2 kw=58.9330755 daily=MT1_DO
Edit Load.MT_336163_M1 kw=39.6212345 daily=MT1_DO
Edit Load.MT_336163_M2 kw=39.6212345 daily=MT1_DO
Edit Load.MT_336819_M1 kw=320.6384015 daily=MT1_DO
Edit Load.MT_336819_M2 kw=320.6384015 daily=MT1_DO
Edit Load.MT_338512_M1 kw=0.8638685 daily=MT3_DO
Edit Load.MT_338512_M2 kw=0.8638685 daily=MT3_DO
