Edit Load.MT_1234839_M1 kw=20.9647835 daily=MT2_DU
Edit Load.MT_1234839_M2 kw=20.9647835 daily=MT2_DU
Edit Load.MT_1237803_M1 kw=12.8747445 daily=MT4_DU
Edit Load.MT_1237803_M2 kw=12.8747445 daily=MT4_DU
Edit Load.MT_1238514_M1 kw=10.0601865 daily=MT5_DU
Edit Load.MT_1238514_M2 kw=10.0601865 daily=MT5_DU
